<?xml version="1.0"?>
<?xml-stylesheet type="text/xsl" href="http://jsbsim.sourceforge.net/JSBSim.xsl"?>
<fdm_config name="B-377" version="2.0" release="ALPHA"
   xmlns:xsi="http://www.w3.org/2001/XMLSchema-instance"
   xsi:noNamespaceSchemaLocation="http://jsbsim.sourceforge.net/JSBSim.xsd">

 <fileheader>
  <author>Aeromatic v 0.9</author>
  <filecreationdate>2011-10-06</filecreationdate>
  <version>$Revison: $</version>
  <description>Models a B-377.</description>
 </fileheader>

<!--
  File:     B377.xml
  Inputs:
    name:          B377
    type:          multi-engine prop transport
    max weight:    145,800 lb
    wing span:     141.25 ft
    length:        110.33 ft
    wing area:     1769.0 sq-ft
    gear type:     tricycle
    retractable?:  yes
    # engines:     4
    engine type:   piston
    engine layout: wings
    yaw damper?    no

  Outputs:
    wing loading:  0.08 lb/sq-ft
    CL-alpha:      4.9 per radian
    CL-0:          0.24
    CL-max:        1.4
    CD-0:          0.025
    K:             0.039

-->

 <metrics>
   <wingarea  unit="FT2"> 1769.00 </wingarea>
   <wingspan  unit="FT" >  141.25 </wingspan>
   <wing_incidence>          2.00 </wing_incidence>
   <chord     unit="FT" >   12.52 </chord>
   <htailarea unit="FT2">  283.04 </htailarea>
   <htailarm  unit="FT" >   55.16 </htailarm>
   <vtailarea unit="FT2">  318.42 </vtailarea>
   <vtailarm  unit="FT" >   55.16 </vtailarm>
   <location name="AERORP" unit="IN">
     <x> 661.98 </x>
     <y>   0.00 </y>
     <z>   0.00 </z>
   </location>
   <location name="EYEPOINT" unit="IN">
     <x> 105.92 </x>
     <y> -24.00 </y>
     <z>  65.00 </z>
   </location>
   <location name="VRP" unit="IN">
     <x>662</x>
     <y>0</y>
     <z>0</z>
   </location>
 </metrics>


 <mass_balance>
   <ixx unit="SLUG*FT2">    333431 </ixx>
   <iyy unit="SLUG*FT2">    206979 </iyy>
   <izz unit="SLUG*FT2">    532199 </izz>
   <emptywt unit="LBS" >     83500 </emptywt>
   <location name="CG" unit="IN">
     <x> 662.0 </x>
     <y>   0.0 </y>
     <z> -10.0 </z>
   </location>

   <pointmass name="passengers-fwd"><!-- 10 passengers -->
      <weight unit="LBS"> 2000 </weight>
      <location name="POINTMASS" unit="IN">
          <x> 340 </x>
          <y>   0 </y>
          <z>  20 </z>
      </location>
   </pointmass>
   <pointmass name="passengers-aft"><!-- 40 passengers -->
      <weight unit="LBS"> 8000 </weight>
      <location name="POINTMASS" unit="IN">
          <x> 750 </x>
          <y>   0 </y>
          <z>  20 </z>
      </location>
   </pointmass>
   <pointmass name="cargo-fwd">
      <weight unit="LBS"> 1000 </weight>
      <location name="POINTMASS" unit="IN">
          <x> 300 </x>
          <y>   0 </y>
          <z> -30 </z>
      </location>
   </pointmass>
   <pointmass name="cago-aft">
      <weight unit="LBS"> 1000 </weight>
      <location name="POINTMASS" unit="IN">
          <x> 800 </x>
          <y>   0 </y>
          <z> -30 </z>
      </location>
   </pointmass>
 </mass_balance>


 <ground_reactions>

  <contact type="BOGEY" name="NOSE">
   <location unit="IN">
     <x> 100.0 </x>
     <y>   0.0 </y>
     <z>-168.0 </z>
   </location>
   <static_friction>  0.80 </static_friction>
   <dynamic_friction> 0.50 </dynamic_friction>
   <rolling_friction> 0.03 </rolling_friction>
   <spring_coeff unit="LBS/FT">      30000.00 </spring_coeff>
   <damping_coeff unit="LBS/FT/SEC"> 20000.00 </damping_coeff>
   <max_steer unit="DEG"> 50.00 </max_steer>
   <brake_group>NONE</brake_group>
   <retractable>1</retractable>
 </contact>

  <contact type="BOGEY" name="LEFT_MAIN">
   <location unit="IN">
     <x>  680.0 </x>
     <y> -200.0 </y>
     <z> -168.0 </z>
   </location>
   <static_friction>  0.80 </static_friction>
   <dynamic_friction> 0.50 </dynamic_friction>
   <rolling_friction> 0.02 </rolling_friction>
   <spring_coeff unit="LBS/FT">      80000.00 </spring_coeff>
   <damping_coeff unit="LBS/FT/SEC"> 50000.00 </damping_coeff>
   <brake_group>LEFT</brake_group>
   <retractable>1</retractable>
 </contact>

  <contact type="BOGEY" name="RIGHT_MAIN">
   <location unit="IN">
     <x>  680.0 </x>
     <y>  200.0 </y>
     <z> -168.0 </z>
   </location>
   <static_friction>  0.80 </static_friction>
   <dynamic_friction> 0.50 </dynamic_friction>
   <rolling_friction> 0.02 </rolling_friction>
   <spring_coeff unit="LBS/FT">      80000.00 </spring_coeff>
   <damping_coeff unit="LBS/FT/SEC"> 50000.00 </damping_coeff>
   <brake_group>RIGHT</brake_group>
   <retractable>1</retractable>
 </contact>

<!--
  <contact type="STRUCTURE" name="LEFT_WING">
    <location unit="IN">
     <x>  260.0 </x>
     <y> -624.0 </y>
     <z>   10.0 </z>
    </location>
    <static_friction>  0.80 </static_friction>
    <dynamic_friction> 0.50 </dynamic_friction>
    <spring_coeff unit="LBS/FT">      45000.00 </spring_coeff>
    <damping_coeff unit="LBS/FT/SEC"> 33000.00 </damping_coeff>
 </contact>

  <contact type="STRUCTURE" name="RIGHT_WING">
    <location unit="IN">
     <x>  260.0 </x>
     <y>  624.0 </y>
     <z>   10.0 </z>
    </location>
    <static_friction>  0.80 </static_friction>
    <dynamic_friction> 0.50 </dynamic_friction>
    <spring_coeff unit="LBS/FT">      45000.00 </spring_coeff>
    <damping_coeff unit="LBS/FT/SEC"> 33000.00 </damping_coeff>
 </contact>

  <contact type="STRUCTURE" name="NOSE">
    <location unit="IN">
     <x>   20.0 </x>
     <y>    0.0 </y>
     <z>  -20.0 </z>
    </location>
    <static_friction>  0.80 </static_friction>
    <dynamic_friction> 0.50 </dynamic_friction>
    <spring_coeff unit="LBS/FT">      45000.00 </spring_coeff>
    <damping_coeff unit="LBS/FT/SEC"> 33000.00 </damping_coeff>
 </contact>
-->
 </ground_reactions>

 <propulsion>

   <engine file="R-4360">
    <location unit="IN">
      <x>  179.0 </x>
      <y> -252.0 </y>
      <z>    1.0 </z>
    </location>
    <feed>0</feed>
    <thruster file="HSProp">
     <location unit="IN">
       <x>  139.0 </x>
       <y> -252.0 </y>
       <z>    1.0 </z>
     </location>
     <orient unit="DEG">
       <pitch> 0.00 </pitch>
       <roll>  0.00 </roll>
       <yaw>   0.00 </yaw>
     </orient>
    </thruster>
  </engine>

   <engine file="R-4360">
    <location unit="IN">
      <x>  155.0 </x>
      <y> -120.0 </y>
      <z>  -10.0 </z>
    </location>
    <feed>1</feed>
    <thruster file="HSProp">
     <location unit="IN">
       <x>  115.0 </x>
       <y> -120.0 </y>
       <z>  -10.0 </z>
     </location>
     <orient unit="DEG">
       <pitch> 0.00 </pitch>
       <roll>  0.00 </roll>
       <yaw>   0.00 </yaw>
     </orient>
    </thruster>
  </engine>

   <engine file="R-4360">
    <location unit="IN">
      <x> 155.0 </x>
      <y> 120.0 </y>
      <z> -10.0 </z>
    </location>
    <feed>2</feed>
    <thruster file="HSProp">
     <location unit="IN">
       <x> 115.0 </x>
       <y> 120.0 </y>
       <z> -10.0 </z>
     </location>
     <orient unit="DEG">
       <pitch> 0.00 </pitch>
       <roll>  0.00 </roll>
       <yaw>   0.00 </yaw>
     </orient>
    </thruster>
  </engine>

   <engine file="R-4360">
    <location unit="IN">
      <x> 179.0 </x>
      <y> 252.0 </y>
      <z>   1.0 </z>
    </location>
    <feed>3</feed>
    <thruster file="HSProp">
     <location unit="IN">
       <x> 139.0 </x>
       <y> 252.0 </y>
       <z>   1.0 </z>
     </location>
     <orient unit="DEG">
       <pitch> 0.00 </pitch>
       <roll>  0.00 </roll>
       <yaw>   0.00 </yaw>
     </orient>
    </thruster>
  </engine>


  <tank type="FUEL" number="0"><!-- Engine 1 -->
     <location unit="IN">
       <x>  664.0 </x>
       <y> -300.0 </y>
       <z>   10.0 </z>
     </location>
     <capacity unit="LBS"> 11680 </capacity>
     <contents unit="LBS">  8000 </contents>
  </tank>

  <tank type="FUEL" number="1"><!-- Engine 2 -->
     <location unit="IN">
       <x>  660.0 </x>
       <y> -200.0 </y>
       <z>    0.0 </z>
     </location>
     <capacity unit="LBS"> 11680 </capacity>
     <contents unit="LBS">  8000 </contents>
  </tank>

  <tank type="FUEL" number="2"><!-- Engine 3 -->
     <location unit="IN">
       <x> 660.0 </x>
       <y> 200.0 </y>
       <z>   0.0 </z>
     </location>
     <capacity unit="LBS"> 11680 </capacity>
     <contents unit="LBS">  8000 </contents>
  </tank>

  <tank type="FUEL" number="3"><!-- Engine 4 -->
     <location unit="IN">
       <x> 664.0 </x>
       <y> 300.0 </y>
       <z>  10.0 </z>
     </location>
     <capacity unit="LBS"> 11680 </capacity>
     <contents unit="LBS">  8000 </contents>
  </tank>

 </propulsion>

 <flight_control name="FCS: B-377"/>

 <system file="gear"/>
 <system file="flaps"/>
 <system file="FCS-pitch"/>
 <system file="FCS-roll"/>
 <system file="FCS-yaw"/>
 <system file="NWS"/>
 <system file="alpha_buffet"/>
 <system file="particles"/>
 <system file="automixture"/>
 <system file="engine-sound"/>
<!-- <system file="feather"/> -->
<!-- <system file="reverse"/> -->


 <aerodynamics>

    <function name="aero/qbar_tail-psf">
      <description>Thrust tube effects at tail</description>
      <sum>
          <property>aero/qbar-psf</property>
          <product>
            <property>forces/fbx-prop-lbs</property>
            <value>0.001</value>
          </product>
      </sum>
    </function>

        <function name="aero/function/kCDge">
            <description>Change_in_drag_due_to_ground_effect</description>
            <product>
                  <table>
                      <independentVar>aero/h_b-mac-ft</independentVar>
                      <tableData>
                          0.0000	0.4800
                          0.1000	0.5150
                          0.1500	0.6290
                          0.2000	0.7090
                          0.3000	0.8150
                          0.4000	0.8820
                          0.5000	0.9280
                          0.6000	0.9620
                          0.7000	0.9880
                          0.8000	1.0000
                      </tableData>
                  </table>
            </product>
        </function>

        <function name="aero/function/kCLge">
            <description>Change_in_lift_due_to_ground_effect</description>
            <product>
                  <table>
                      <independentVar>aero/h_b-mac-ft</independentVar>
                      <tableData>
                          0.0000	1.2030
                          0.1000	1.1270
                          0.1500	1.0900
                          0.2000	1.0730
                          0.3000	1.0460
                          0.4000	1.0550
                          0.5000	1.0190
                          0.6000	1.0130
                          0.7000	1.0080
                          0.8000	1.0060
                          0.9000	1.0030
                          1.0000	1.0020
                          1.1000	1.0000
                      </tableData>
                  </table>
            </product>
        </function>


  <axis name="LIFT">

    <function name="aero/coefficient/CLalpha">
      <description>Lift_due_to_alpha</description>
      <product>
          <property>aero/qbar-psf</property>
          <property>metrics/Sw-sqft</property>
          <property>aero/function/kCLge</property>
          <table>
            <independentVar lookup="row">aero/alpha-rad</independentVar>
            <tableData>
              -0.20  -0.740
               0.00   0.270
               0.24   1.450
               0.60   0.704
            </tableData>
          </table>
      </product>
    </function>

    <function name="aero/coefficient/dCLflap">
       <description>Delta_Lift_due_to_flaps</description>
       <product>
           <property>aero/qbar-psf</property>
           <property>metrics/Sw-sqft</property>
           <property>fcs/flap-pos-deg</property>
           <value> 0.02 </value>
       </product>
    </function>


    <function name="aero/coefficient/CLde">
       <description>Lift_due_to_Elevator_Deflection</description>
       <product>
           <property>aero/qbar-psf</property>
           <property>metrics/Sw-sqft</property>
           <property>fcs/elevator-pos-rad</property>
           <value>0.2</value>
       </product>
    </function>

  </axis>

  <axis name="DRAG">

    <function name="aero/coefficient/CD0">
       <description>Drag_at_zero_lift</description>
       <product>
          <property>aero/qbar-psf</property>
          <property>metrics/Sw-sqft</property>
          <table>
            <independentVar lookup="row">aero/alpha-rad</independentVar>
            <tableData>
             -1.57    1.500
             -0.26    0.033
              0.00    0.025
              0.26    0.033
              1.57    1.500
            </tableData>
          </table>
       </product>
    </function>

    <function name="aero/coefficient/CDi">
       <description>Induced_drag</description>
         <product>
           <property>aero/qbar-psf</property>
           <property>metrics/Sw-sqft</property>
           <property>aero/cl-squared</property>
           <property>aero/function/kCDge</property>
           <value>0.035</value>
         </product>
    </function>

    <function name="aero/coefficient/CDmach">
       <description>Drag_due_to_mach</description>
        <product>
          <property>aero/qbar-psf</property>
          <property>metrics/Sw-sqft</property>
          <table>
            <independentVar lookup="row">velocities/mach</independentVar>
            <tableData>
                0.0      0.0
                0.6      0.0
                1.10     0.03
            </tableData>
          </table>
        </product>
    </function>

    <function name="aero/coefficient/CDflap">
       <description>Drag_due_to_flaps</description>
         <product>
           <property>aero/qbar-psf</property>
           <property>metrics/Sw-sqft</property>
           <property>fcs/flap-pos-deg</property>
           <value> 0.0012 </value>
         </product>
    </function>

    <function name="aero/coefficient/CDgear">
       <description>Drag_due_to_gear</description>
         <product>
           <property>aero/qbar-psf</property>
           <property>metrics/Sw-sqft</property>
           <property>gear/gear-pos-norm</property>
           <value>0.023</value>
         </product>
    </function>

    <function name="aero/coefficient/CDbeta">
       <description>Drag_due_to_sideslip</description>
       <product>
          <property>aero/qbar-psf</property>
          <property>metrics/Sw-sqft</property>
          <table>
            <independentVar lookup="row">aero/beta-rad</independentVar>
            <tableData>
              -1.57    1.230
              -0.26    0.050
               0.00    0.000
               0.26    0.050
               1.57    1.230
            </tableData>
          </table>
       </product>
    </function>

    <function name="aero/coefficient/CDde">
       <description>Drag_due_to_Elevator_Deflection</description>
       <product>
           <property>aero/qbar-psf</property>
           <property>metrics/Sw-sqft</property>
           <abs><property>fcs/elevator-pos-norm</property></abs>
           <value>0.04</value>
       </product>
    </function>

  </axis>

  <axis name="SIDE">

    <function name="aero/coefficient/CYb">
       <description>Side_force_due_to_beta</description>
       <product>
           <property>aero/qbar-psf</property>
           <property>metrics/Sw-sqft</property>
           <property>aero/beta-rad</property>
           <value>-1</value>
       </product>
    </function>

  </axis>

  <axis name="ROLL">

    <function name="aero/coefficient/Clb">
       <description>Roll_moment_due_to_beta</description>
       <product>
           <property>aero/qbar-psf</property>
           <property>metrics/Sw-sqft</property>
           <property>metrics/bw-ft</property>
           <property>aero/beta-rad</property>
           <value>-0.1</value>
       </product>
    </function>

    <function name="aero/coefficient/Clp">
       <description>Roll_moment_due_to_roll_rate</description>
       <product>
           <property>aero/qbar-psf</property>
           <property>metrics/Sw-sqft</property>
           <property>metrics/bw-ft</property>
           <property>aero/bi2vel</property>
           <property>velocities/p-aero-rad_sec</property>
           <value>-0.4</value>
       </product>
    </function>

    <function name="aero/coefficient/Clr">
       <description>Roll_moment_due_to_yaw_rate</description>
       <product>
           <property>aero/qbar-psf</property>
           <property>metrics/Sw-sqft</property>
           <property>metrics/bw-ft</property>
           <property>aero/bi2vel</property>
           <property>velocities/r-aero-rad_sec</property>
           <value>0.15</value>
       </product>
    </function>

    <function name="aero/coefficient/Clda">
       <description>Roll_moment_due_to_aileron</description>
       <product>
          <property>aero/qbar-psf</property>
          <property>metrics/Sw-sqft</property>
          <property>metrics/bw-ft</property>
          <property>fcs/left-aileron-pos-rad</property>
          <value>0.11</value>
       </product>
    </function>

    <function name="aero/coefficient/Cldr">
       <description>Roll_moment_due_to_rudder</description>
       <product>
           <property>aero/qbar-psf</property>
           <property>metrics/Sw-sqft</property>
           <property>metrics/bw-ft</property>
           <property>fcs/rudder-pos-rad</property>
           <value>0.005</value>
       </product>
    </function>

  </axis>

  <axis name="PITCH">

    <function name="aero/coefficient/Cmalpha">
       <description>Pitch_moment_due_to_alpha</description>
       <product>
           <property>aero/qbar-psf</property>
           <property>metrics/Sw-sqft</property>
           <property>metrics/cbarw-ft</property>
           <property>aero/alpha-rad</property>
           <value>-0.4</value>
       </product>
    </function>

    <function name="aero/coefficient/Cmde">
       <description>Pitch_moment_due_to_elevator</description>
       <product>
          <property>aero/qbar-psf</property>
          <property>metrics/Sw-sqft</property>
          <property>metrics/cbarw-ft</property>
          <property>fcs/elevator-pos-rad</property>
          <value>-0.9</value>
        </product>
    </function>

    <function name="aero/coefficient/Cmq">
       <description>Pitch_moment_due_to_pitch_rate</description>
       <product>
           <property>aero/qbar-psf</property>
           <property>metrics/Sw-sqft</property>
           <property>metrics/cbarw-ft</property>
           <property>aero/ci2vel</property>
           <property>velocities/q-aero-rad_sec</property>
           <value>-22</value>
       </product>
    </function>

    <function name="aero/coefficient/Cmadot">
       <description>Pitch_moment_due_to_alpha_rate</description>
       <product>
           <property>aero/qbar-psf</property>
           <property>metrics/Sw-sqft</property>
           <property>metrics/cbarw-ft</property>
           <property>aero/ci2vel</property>
           <property>aero/alphadot-rad_sec</property>
           <value>-8</value>
       </product>
    </function>

  </axis>

  <axis name="YAW">

    <function name="aero/coefficient/Cnb">
       <description>Yaw_moment_due_to_beta</description>
       <product>
           <property>aero/qbar-psf</property>
           <property>metrics/Sw-sqft</property>
           <property>metrics/bw-ft</property>
           <property>aero/beta-rad</property>
           <value>0.12</value>
       </product>
    </function>

    <function name="aero/coefficient/Cnr">
       <description>Yaw_moment_due_to_yaw_rate</description>
       <product>
           <property>aero/qbar-psf</property>
           <property>metrics/Sw-sqft</property>
           <property>metrics/bw-ft</property>
           <property>aero/bi2vel</property>
           <property>velocities/r-aero-rad_sec</property>
           <value>-0.15</value>
       </product>
    </function>

    <function name="aero/coefficient/Cndr">
       <description>Yaw_moment_due_to_rudder</description>
       <product>
           <property>aero/qbar-psf</property>
           <property>metrics/Sw-sqft</property>
           <property>metrics/bw-ft</property>
           <property>fcs/rudder-pos-rad</property>
           <value>-0.1</value>
       </product>
    </function>

    <function name="aero/coefficient/Cnda">
       <description>Adverse_yaw</description>
       <product>
           <property>aero/qbar-psf</property>
           <property>metrics/Sw-sqft</property>
           <property>metrics/bw-ft</property>
           <property>fcs/left-aileron-pos-rad</property>
           <value>-0.01</value>
       </product>
    </function>

  </axis>

 </aerodynamics>

</fdm_config>
