<?xml version="1.0"?>
<!-- Generated by Aero-Matic v 1.1

     Inputs:
                horsepower: 3500.0
                     pitch: variable
            max engine rpm: 2700
        prop diameter (ft): 17

     Outputs:
              max prop rpm: 1103.71
                gear ratio:    2.45
                       Cp0: 0.091594
                       Ct0: 0.213414
       static thrust (lbs): 14342.86
-->

<propeller name="prop">
  <ixx> 200.00 </ixx>
  <diameter unit="IN"> 200.0 </diameter>
  <numblades> 4 </numblades>
  <gearratio>  2.67 </gearratio>
  <p_factor>  0 </p_factor>
  <minpitch> 15 </minpitch>
  <maxpitch> 65 </maxpitch>
  <minrpm>    637 </minrpm>
  <maxrpm>   1011 </maxrpm>

 <!-- thrust coefficient as a function of advance ratio and blade angle -->
  <table name="C_THRUST" type="internal">
      <tableData>
                -10        0         15        25        35        45        55        65       90
      -0.2      -0.1041    0.0587    0.2134    0.2614    0.2881    0.3041    0.2802    0.2401   0.0000
       0.0      -0.1547    0.0000    0.2134    0.2614    0.2881    0.3069    0.2868    0.2401   0.0000
       0.2      -0.1735   -0.0534    0.1842    0.2561    0.2841    0.3069    0.2868    0.2401   0.0000
       0.4      -0.1735   -0.1240    0.1387    0.2535    0.2787    0.3041    0.2868    0.2401   0.0000
       0.6      -0.1735   -0.1735    0.0734    0.2281    0.2668    0.2962    0.2828    0.2401   0.0000
       0.8      -0.1735   -0.1735    0.0041    0.1707    0.2589    0.2855    0.2828    0.2401   0.0000
       1.0      -0.1735   -0.1735   -0.0694    0.1041    0.2482    0.2708    0.2802    0.2401   0.0000
       1.2      -0.1735   -0.1735   -0.1428    0.0320    0.2040    0.2614    0.2802    0.2401   0.0000
       1.4      -0.1735   -0.1735   -0.1735   -0.0467    0.1468    0.2574    0.2749    0.2401   0.0000
       1.6      -0.1735   -0.1735   -0.1735   -0.1187    0.0800    0.2482    0.2695    0.2401   0.0000
       1.8      -0.1735   -0.1735   -0.1735   -0.1735    0.0134    0.2134    0.2614    0.2401   0.0000
       2.0      -0.1735   -0.1735   -0.1735   -0.1735   -0.0534    0.1667    0.2604    0.2401   0.0000
       2.2      -0.1735   -0.1735   -0.1735   -0.1735   -0.1202    0.1202    0.2561    0.2401   0.0000
       2.4      -0.1735   -0.1735   -0.1735   -0.1735   -0.1735    0.0640    0.2091    0.2401   0.0000
       2.6      -0.1735   -0.1735   -0.1735   -0.1735   -0.1735    0.0081    0.1323    0.2134   0.0000
       2.8      -0.1735   -0.1735   -0.1735   -0.1735   -0.1735   -0.0480    0.0866    0.1735   0.0000
       3.0      -0.1735   -0.1735   -0.1735   -0.1735   -0.1735   -0.1041    0.0455    0.1334   0.0000
       3.2      -0.1735   -0.1735   -0.1735   -0.1735   -0.1735   -0.1601    0.0041    0.0935   0.0000
       3.4      -0.1735   -0.1735   -0.1735   -0.1735   -0.1735   -0.1735   -0.0373    0.0534   0.0000
       3.6      -0.1735   -0.1735   -0.1735   -0.1735   -0.1735   -0.1735   -0.0787    0.0134   0.0000
       3.8      -0.1735   -0.1735   -0.1735   -0.1735   -0.1735   -0.1735   -0.1202   -0.0267   0.0000
       4.0      -0.1735   -0.1735   -0.1735   -0.1735   -0.1735   -0.1735   -0.1613   -0.0668   0.0000
       6.0      -0.1735   -0.1735   -0.1735   -0.1735   -0.1735   -0.1735   -0.1735   -0.1735   0.0000
      </tableData>
  </table>

 <!-- power coefficient as a function of advance ratio and blade angle -->
  <table name="C_POWER" type="internal">
     <tableData>
               -10        0        15        25        35        45        55        65       90
      -0.2      0.0153   0.0305    0.1069    0.2427    0.4186    0.5954    0.6870    0.7602   0.7602
       0.0      0.0611   0.0153    0.0916    0.2262    0.4003    0.5954    0.6897    0.7602   0.7602
       0.2      0.0870   0.0245    0.0886    0.2107    0.3829    0.5954    0.6897    0.7602   0.7602
       0.4      0.1172   0.0534    0.0763    0.1942    0.3636    0.5954    0.6897    0.7602   0.7602
       0.6      0.1438   0.0809    0.0504    0.1804    0.3407    0.5835    0.6870    0.7602   0.7602
       0.8      0.1694   0.1084    0.0153    0.1530    0.3206    0.5569    0.6870    0.7602   0.7602
       1.0      0.1951   0.1346    0.0153    0.1072    0.3023    0.5285    0.6842    0.7602   0.7602
       1.2      0.2217   0.1076   -0.0504    0.0412    0.2675    0.5065    0.6796    0.7602   0.7602
       1.4      0.2473   0.1859   -0.0760   -0.0305    0.2061    0.4992    0.6714    0.7602   0.7602
       1.6      0.2730   0.2125   -0.0888   -0.0916    0.1301    0.4854    0.6567    0.7328   0.7602
       1.8      0.2995   0.2381   -0.0916   -0.1530    0.0382    0.4305    0.6366    0.7172   0.7602
       2.0      0.3252   0.2638   -0.1172   -0.2134   -0.0458    0.3664    0.6064    0.7025   0.7602
       2.2      0.3508   0.2904   -0.1438   -0.2748   -0.1374    0.2977    0.5880    0.6714   0.7602
       2.4      0.3774   0.3160   -0.1694   -0.3362   -0.2290    0.2125    0.5706    0.6567   0.7602
       2.6      0.4030   0.3416   -0.1951   -0.3966   -0.2904    0.0888    0.5569    0.6338   0.7602
       2.8      0.4287   0.3682   -0.2217   -0.4580   -0.3481   -0.0302    0.5450    0.6256   0.7602
       3.0      0.4552   0.3939   -0.2473   -0.5193   -0.4122   -0.1374    0.5267    0.6256   0.7602
       3.2      0.4809   0.4195   -0.2730   -0.5798   -0.4735   -0.2446    0.4928    0.6109   0.7602
       3.4      0.5065   0.4461   -0.2995   -0.6412   -0.5340   -0.3508    0.3819    0.5954   0.7602
       3.6      0.5331   0.4717   -0.3252   -0.7025   -0.5954   -0.4580    0.2684    0.5798   0.7602
       3.8      0.5587   0.4974   -0.3508   -0.7602   -0.6567   -0.5651    0.1493    0.5615   0.7602
       4.0      0.5844   0.5239   -0.3774   -0.7602   -0.7602   -0.6714    0.0302    0.5193   0.7602
       6.0      0.7602   0.7602   -0.7602   -0.7602   -0.7602   -0.7602   -0.7602   -0.4580   0.7602
     </tableData>
  </table>

<!-- thrust effects of helical tip Mach -->
<table name="CT_MACH" type="internal">
  <tableData>
    0.85   1.0
    1.05   0.8
  </tableData>
</table>

<!-- power-required effects of helical tip Mach -->
<table name="CP_MACH" type="internal">
  <tableData>
    0.85   1.0
    1.05   1.8
    2.00   1.4
  </tableData>
</table>

</propeller>
