<?xml version="1.0"?>
<!--
  File:     R-4360.xml
  Author:   Aero-Matic v 0.82

  Inputs:
    name:           R-4360
    type:           piston
    power:          3500.0 hp
    augmented?      no
    injected?       no
-->

<piston_engine name="R-4360">

  <maxmp unit="INHG">         45.0 </maxmp>
  <displacement unit="IN3"> 4363.00 </displacement>
  <maxhp>        3500.00 </maxhp>
  <static-friction> 1.5 </static-friction> <!-- this is the default value -->
  <sparkfaildrop>  1.0 </sparkfaildrop>
  <cycles>         4   </cycles>
  <idlerpm>      530.0 </idlerpm>
  <maxrpm>      2700.0 </maxrpm>
  <bsfc>           0.43 </bsfc>
  <volumetric-efficiency> 0.82 </volumetric-efficiency>
  <compression-ratio> 6.7  </compression-ratio>
  <bore unit="IN">    5.75 </bore>
  <stroke unit="IN">  6.00 </stroke>
  <cylinders>        28.0  </cylinders>
  <cylinder-head-mass> 2 </cylinder-head-mass> <!-- kilograms ??? -->
  <air-intake-impedance-factor>-1</air-intake-impedance-factor> <!-- use calculated value -->
  <ram-air-factor> 1 </ram-air-factor> <!-- this is the default value -->
  <cooling-factor> 0.5144444 </cooling-factor> <!-- this is the default value -->
  <dynamic-fmep> 18400 </dynamic-fmep> <!-- Pascals, this is the default value -->
  <static-fmep> 46500 </static-fmep> <!-- Pascals, this is the default value -->
  <peak-piston-speed> 45 </peak-piston-speed> <!-- fps, calculated default =     -->
                                              <!-- (Stroke X MaxRPM) / 360       -->

  <numboostspeeds>      2   </numboostspeeds>
  <boostmanual>         0   </boostmanual>

  <ratedboost1 unit="INHG">      15.0</ratedboost1>  <!-- (45 - 30) -->
  <ratedpower1>    3200    </ratedpower1>
  <ratedrpm1>      2350    </ratedrpm1>
  <ratedaltitude1> 7900    </ratedaltitude1>

  <ratedboost2 unit="INHG">     15.0</ratedboost2>  <!-- (45 - 30) -->
  <ratedpower2>     3000    </ratedpower2>
  <ratedrpm2>       2350    </ratedrpm2>
  <ratedaltitude2> 17200    </ratedaltitude2>

  <takeoffboost unit="INHG">  26  </takeoffboost>  <!-- (56 - 30) -->


  <!-- Combustion efficiency table. (Optional)         -->
  <!-- These are the default values.                   -->
  <!-- First column is "phi", equivalence ratio.       -->
  <!-- Second column is "neta", combustion efficiency. -->
  <table name="COMBUSTION" type="internal">
    <tableData>
        0.00    0.980
        0.90    0.980
        1.00    0.970
        1.05    0.950
        1.10    0.900
        1.15    0.850
        1.20    0.790
        1.30    0.700
        1.40    0.630
        1.50    0.570
        1.60    0.525
        2.00    0.345
    </tableData>
  </table>

  <!-- Mixture efficiency correlation table.  (Optional)  -->
  <!-- These are the default values.                      -->
  <!-- First column is fuel/air ratio.                    -->
  <!-- Second column is "neta", mixture efficiency.       -->
  <table name="MIXTURE" type="internal">
    <tableData>
        0.05000    0.00000
        0.05137    0.00862
        0.05179    0.21552
        0.05430    0.48276
        0.05842    0.70690
        0.06312    0.83621
        0.06942    0.93103
        0.07786    1.00000
        0.08845    1.00000
        0.09270    0.98276
        0.10120    0.93103
        0.11455    0.72414
        0.12158    0.45690
        0.12435    0.23276
        0.12500    0.00000
    </tableData>
  </table>

</piston_engine>
